<Node name="root" dt="0.01" gravity="0 0 0">
    <EulerImplicitSolver dt="0.01" rayleighStiffness="0.1" rayleighMass="0.1" />
    <CGLinearSolver iterations="25" tolerance="1e-9" threshold="1e-9" />
    <Node name="Particle">
        <MechanicalObject template="Rigid3d" name="myParticle" position="0 0 0 0 0 0 1"
            translation="0 1 0" rotation="0 0 0" showObject="1" />
        <UniformMass totalMass="1" />
        <ConstantForceField totalForce="1 0 0 0 0 0" />
    </Node>
</Node>
